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X_left_drum := -100 mm
Y_left_drum := 250 mm
X_origin := 0 mm
Y_origin := 0 mm
D := 111.408 mm
L_left_to_origin_from_center := sqrt((X_left_drum^2 + (Y_left_drum^2))) = 269.258 mm
L_left_tangent_to_origin := sqrt(L_left_to_origin_from_center^2 - (D/2)^2) = 263.433 mm
θ_1L := -atan(X_left_drum/Y_left_drum) = 21.8014 deg
θ_2L := atan(D/2/L_left_tangent_to_origin) = 11.9395 deg
θ_L := θ_1L + θ_2L = 33.741 deg
L_Left_arc_to_origin := θ_L*D/2 = 32.8036 mm
L_Left_origin := L_left_tangent_to_origin + L_Left_arc_to_origin = 296.237 mm
X_right_drum := 400 mm
Y_right_drum := 250 mm
L_right_to_origin_from_center := sqrt((X_right_drum^2 + (Y_right_drum^2))) = 471.699 mm
L_right_tangent_to_origin := sqrt(L_right_to_origin_from_center^2 - (D/2)^2) = 468.398 mm
θ_1R := -atan(X_right_drum/Y_right_drum) = -57.9946 deg
θ_2R := atan(D/2/L_right_tangent_to_origin) = 6.78201 deg
θ_R := -θ_1R + θ_2R = 64.7766 deg
L_right_arc := θ_R*D/2 = 62.977 mm
L_Right_origin := L_right_tangent_to_origin + L_right_arc = 531.375 mm
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X_target := 200 mm
Y_target := -75 mm
L_left_to_target_from_center := sqrt(((X_left_drum - X_target)^2 + ((Y_left_drum - Y_target)^2))) = 442.295 mm
L_left_tangent_to_target := sqrt(L_left_to_target_from_center^2 - (D/2)^2) = 438.773 mm
θ_1L := -atan((X_left_drum - X_target)/(Y_left_drum - Y_target)) = 0.745419
θ_2L := atan(D/2/L_left_tangent_to_target) = 7.23522 deg
θ_L := θ_1L + θ_2L = 49.9446 deg
L_Left_arc := θ_L*D/2 = 48.5571 mm
L_Left_target := L_left_tangent_to_target + L_Left_arc = 487.33 mm
L_right_to_target_from_center := sqrt(((X_right_drum - X_target)^2 + ((Y_right_drum - Y_target)^2))) = 381.608 mm
L_right_tangent_to_target := sqrt(L_right_to_target_from_center^2 - (D/2)^2) = 377.521 mm
θ_1R := atan((X_right_drum - X_target)/(Y_right_drum - Y_target)) = 31.6075 deg
θ_2R := atan(D/2/L_right_tangent_to_target) = 8.39355 deg
θ_R := θ_1R + θ_2R = 40.001 deg
L_right_arc := θ_R*D/2 = 38.8897 mm
L_Right_target := L_right_tangent_to_target + L_right_arc = 416.411 mm
Delta_left := L_Left_target - L_Left_origin = 191.094 mm
Delta_right := L_Right_target - L_Right_origin = -114.965 mm
steps_per_rev := 1600
Gear_Reduction := 25
Left_turns := Delta_left/(π*D) = 0.545984
Right_turns := Delta_right/(π*D) = -0.328472
Steps_left := Left_turns*steps_per_rev*Gear_Reduction = 21839.4
Steps_right := Right_turns*steps_per_rev*Gear_Reduction = -13138.9
